**
** ABAQUS Input Deck Generated by HyperMesh Version  : 14.0.0.88
** Generated using HyperMesh-Abaqus Template Version : 14.0
**
**   Template:  ABAQUS/STANDARD 3D
**
*NODE
         1,  1000.0         ,  250.0          ,  0.0
         2,  987.5          ,  250.0          ,  0.0
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**HWCOLOR COMP          4     6
*ELEMENT,TYPE=B31,ELSET=JOINT
      5441,      3577,      5836
      5442,      3582,      5841
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**HWCOLOR COMP          1     3
*ELEMENT,TYPE=S4R,ELSET=WEB
         1,       284,       285,       280,       281
         2,       285,       276,       277,       280
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**HWCOLOR COMP          2     4
*ELEMENT,TYPE=S4R,ELSET=FLANGE
      1601,      1825,      1826,      1821,      1822
      1602,      1826,      1817,      1818,      1821
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**HWCOLOR COMP          3     5
*ELEMENT,TYPE=S4R,ELSET=SKIN
      3521,      4408,      4409,      4404,      4405
      3522,      4409,      4400,      4401,      4404
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**HM_PROP_ID          1
**HM_comp_by_property "SHELL"    18
*SHELL SECTION, ELSET=WEB, MATERIAL=Nylon
100.0     ,
**HM_PROP_ID          1
**HM_comp_by_property "SHELL"    18
*SHELL SECTION, ELSET=FLANGE, MATERIAL=Nylon
100.0     ,
**HM_PROP_ID          1
**HM_comp_by_property "SHELL"    18
*SHELL SECTION, ELSET=SKIN, MATERIAL=Nylon
100.0     ,
**HM_PROP_ID          2
**HM_comp_by_property "PJOINT"     7
**HMBEAMSEC ASSOC                      2               1
*BEAM SECTION, ELSET=JOINT, MATERIAL= Nylon, SECTION=CIRC
1.0       ,
**HMNAME BEAMSECTCOL          1 BEAM
**HMNAME BEAMSECTS
**HMCONT               1               1circle_section.1
**HMCONT       2       7       1       01.0     1.0     0.0     0.0     0.0
**HMCONT0.0            2
**HMNAME BEAMSECTS  BEAMSECTIONSTANDARD       11       1       0CIRC
**HMNAME BEAMSECTS  BEAMSECTIONSTANDARD  PARAMETERS     1.0     10.0    10.0
**HMNAME BEAMSECTS  END
*NSET, NSET=joint
      3577,      3582,      3587,      3600,      3645,      3682,      3695,      3740,
      3777,      3782,      3795,      3840,      3877,      3890,      3935,      6036
**HMNAME MATS          1 Nylon     3
*MATERIAL, NAME=Nylon
*ELASTIC, TYPE = ISOTROPIC
3000.0    ,0.4       ,0.0
**HMNAME LOADSTEP          1 LOAD
*STEP
*STATIC
**HWNAME LOADCOL          1 auto1
**HWCOLOR LOADCOL          1    17
*BOUNDARY
        81,1,6,0.0
        82,1,6,0.0
        83,1,6,0.0
        84,1,6,0.0
        85,1,6,0.0
        86,1,6,0.0
        87,1,6,0.0
        88,1,6,0.0
        89,1,6,0.0
        90,1,6,0.0
        91,1,6,0.0
        92,1,6,0.0
        93,1,6,0.0
        94,1,6,0.0
        95,1,6,0.0
        96,1,6,0.0
        97,1,6,0.0
        98,1,6,0.0
        99,1,6,0.0
       100,1,6,0.0
       101,1,6,0.0
      1783,1,6,0.0
      1784,1,6,0.0
      1785,1,6,0.0
      1786,1,6,0.0
      1787,1,6,0.0
      2269,1,6,0.0
      2270,1,6,0.0
      2271,1,6,0.0
      2272,1,6,0.0
      2273,1,6,0.0
      2675,1,6,0.0
      2837,1,6,0.0
      3079,1,6,0.0
      3080,1,6,0.0
      3081,1,6,0.0
      3082,1,6,0.0
      3083,1,6,0.0
      3565,1,6,0.0
      3566,1,6,0.0
      3567,1,6,0.0
      3568,1,6,0.0
      3569,1,6,0.0
      3971,1,6,0.0
      4133,1,6,0.0
*CLOAD
       191,2,-10000.0
*END STEP
*****
