**
** ABAQUS Input Deck Generated by HyperMesh Version  : 11.0.0.47
** Generated using HyperMesh-Abaqus Template Version : 11.0.0.47
**
**   Template:  ABAQUS/STANDARD 3D
**
*NODE
         1,  1000.0         ,  250.0          ,  0.0
         2,  987.5          ,  250.0          ,  0.0
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**HWCOLOR COMP          1     3
*ELEMENT,TYPE=S4R,ELSET=auto1
         1,       284,       285,       280,       281
         2,       285,       276,       277,       280
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**HM_comp_by_property "CONT"    18
*SHELL SECTION, ELSET=auto1, MATERIAL=Nylon
100.0     ,
*MATERIAL, NAME=Nylon
*ELASTIC, TYPE = ISOTROPIC
3000.0    ,0.4       ,0.0
*****
